*Heading
** Job name: DCB Model name: Model-1
** Generated by: Abaqus/CAE 2018
*Preprint, echo=NO, model=NO, history=NO, contact=NO
**
** PARTS
**
*Part, name=Bot
*Node
      1,          40.,           3.,   2.24000001
      2,          40.,           3.,           0.
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*Element, type=C3D8
   1,  350, 2522, 6066, 1732,    1,   15, 1258,  177
   2, 2522, 2523, 6067, 6066,   15,   16, 1259, 1258
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*Nset, nset=Front
   3,   9, 361, 362, 363, 364, 365
*Elset, elset=Front
  318,  319,  638,  639,  958,  959, 1278, 1279, 1598, 1599, 1918, 1919
*Nset, nset=Back
   3,   9, 361, 362, 363, 364, 365
*Elset, elset=Back
  318,  319,  638,  639,  958,  959, 1278, 1279, 1598, 1599, 1918, 1919
*Nset, nset=Top
    1,   10,   11,   12,  346,  347
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*Elset, elset=Top
 1921, 1922, 1923, 1924, 1925, 1926
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*Nset, nset=Bot
    2,    6,   13,   14,  356,  357
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*Elset, elset=Bot
 1939, 1940, 1941, 1942, 1943, 1944
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*Nset, nset=FullGeom, generate
     1,  10535,      1
*Elset, elset=FullGeom, generate
    1,  7200,     1
*Nset, nset=X_Edges
    1,    2,    4,    5,    6,    7
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*Elset, elset=X_Edges
    1,    4,    5,    8,    9,   12
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*Orientation, name=Ori-1
1., 0., 0., 0., 1., 0.
1, 0.
** Section: BotSec
*Solid Section, elset=FullGeom, orientation=Ori-1, material=BotMat
1.,
*End Part
**
*Part, name=Cz
*Node
      1,         110.,           3.,  0.200000003
      2,         110.,          2.5,  0.200000003
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*Element, type=COH3D8
   1,   22,   23,    9,    8,   15,   16,    2,    1
   2,   23,   24,   10,    9,   16,   17,    3,    2
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*Nset, nset=FullGeom, generate
    1,  3094,     1
*Elset, elset=FullGeom, generate
    1,  1320,     1
*Nset, nset=Top
    1,    2,    3,    4,    5,    6
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*Elset, elset=Top, generate
    1,  1320,     1
*Nset, nset=Bot
    8,    9,   10,   11,   12,   13
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*Elset, elset=Bot, generate
    1,  1320,     1
*Nset, nset=Front, generate
 1,  7,  1
*Elset, elset=Front, generate
 1,  6,  1
*Nset, nset=Back, generate
 3081,  3087,     1
*Elset, elset=Back, generate
 1315,  1320,     1
*Nset, nset=X_Edges
    1,    7,    8,   14,   15,   21
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*Elset, elset=X_Edges
    1,    6,    7,   12,   13,   18
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** Section: CzSec
*Cohesive Section, elset=FullGeom, material=CzMat, response=TRACTION SEPARATION
,
*End Part
**
*Part, name=Top
*Node
      1,          40.,           3.,   2.24000001
      2,          40.,           3.,           0.
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*Element, type=C3D8
   1,  350, 2522, 6066, 1732,    1,   15, 1258,  177
   2, 2522, 2523, 6067, 6066,   15,   16, 1259, 1258
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*Nset, nset=Front
   3,   9, 361, 362, 363, 364, 365
*Elset, elset=Front
  318,  319,  638,  639,  958,  959, 1278, 1279, 1598, 1599, 1918, 1919
*Nset, nset=Back
   3,   9, 361, 362, 363, 364, 365
*Elset, elset=Back
  318,  319,  638,  639,  958,  959, 1278, 1279, 1598, 1599, 1918, 1919
*Nset, nset=Top
    1,   10,   11,   12,  346,  347
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*Elset, elset=Top
 1921, 1922, 1923, 1924, 1925, 1926
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*Nset, nset=Bot
    2,    6,   13,   14,  356,  357
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*Elset, elset=Bot
 1939, 1940, 1941, 1942, 1943, 1944
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*Nset, nset=FullGeom, generate
     1,  10535,      1
*Elset, elset=FullGeom, generate
    1,  7200,     1
*Nset, nset=X_Edges
    1,    2,    4,    5,    6,    7
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*Elset, elset=X_Edges
    1,    4,    5,    8,    9,   12
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*Orientation, name=Ori-1
1., 0., 0., 0., 1., 0.
1, 0.
** Section: TopSec
*Solid Section, elset=FullGeom, orientation=Ori-1, material=TopMat
1.,
*End Part
**
**
** ASSEMBLY
**
*Assembly, name=Assembly
**
*Instance, name=ceInst, part=Cz
         40.,           0.,         2.24
*End Instance
**
*Instance, name=pTop, part=Top
          0.,           0.,         2.44
*End Instance
**
*Instance, name=pBot, part=Bot
*End Instance
**
*Node
      1,           0.,           0.,   4.67999983
*Node
      2,           0.,           0.,           0.
*Nset, nset=FixedEnd, instance=pBot
   3,   9, 361, 362, 363, 364, 365
*Elset, elset=FixedEnd, instance=pBot
  318,  319,  638,  639,  958,  959, 1278, 1279, 1598, 1599, 1918, 1919
*Nset, nset=FixedPoint
 2,
*Nset, nset=LoadEnd, instance=pTop
   3,   9, 361, 362, 363, 364, 365
*Elset, elset=LoadEnd, instance=pTop
  318,  319,  638,  639,  958,  959, 1278, 1279, 1598, 1599, 1918, 1919
*Nset, nset=LoadPoint
 1,
*Surface, type=NODE, name=ceInst_Top_CNS_, internal
ceInst.Top, 1.
*Surface, type=NODE, name=pTop_Bot_CNS_, internal
pTop.Bot, 1.
*Surface, type=NODE, name=ceInst_Bot_CNS_, internal
ceInst.Bot, 1.
*Surface, type=NODE, name=pBot_Top_CNS_, internal
pBot.Top, 1.
*Surface, type=NODE, name=FixedEnd_CNS_, internal
FixedEnd, 1.
*Surface, type=NODE, name=LoadEnd_CNS_, internal
LoadEnd, 1.
** Constraint: Constraint-1
*Tie, name=Constraint-1, adjust=no, no rotation, type=NODE TO SURFACE
pTop_Bot_CNS_, ceInst_Top_CNS_
** Constraint: Constraint-2
*Tie, name=Constraint-2, adjust=no, no rotation, type=NODE TO SURFACE
pBot_Top_CNS_, ceInst_Bot_CNS_
** Constraint: Constraint-11
*Coupling, constraint name=Constraint-11, ref node=FixedPoint, surface=FixedEnd_CNS_
*Kinematic
** Constraint: Constraint-12
*Coupling, constraint name=Constraint-12, ref node=LoadPoint, surface=LoadEnd_CNS_
*Kinematic
*End Assembly
**
** MATERIALS
**
*Material, name=BotMat
*Elastic, type=ENGINEERING CONSTANTS
140000.,8819.,8819., 0.34, 0.34, 0.38,4315.,4315.
3200.,
*Material, name=CzMat
*Damage Initiation, criterion=QUADS
18., 48.24, 48.24
*Damage Evolution, type=ENERGY, mixed mode behavior=BK, power=4.
 0.71, 5.1, 5.1
*Elastic, type=TRACTION
 1e+06, 1e+06, 1e+06
*Material, name=TopMat
*Elastic, type=ENGINEERING CONSTANTS
140000.,8819.,8819., 0.34, 0.34, 0.38,4315.,4315.
3200.,
** ----------------------------------------------------------------
**
** STEP: Step-1
**
*Step, name=Step-1, nlgeom=YES, inc=1000000000
*Static
0.001, 1., 1e-15, 0.01
**
** BOUNDARY CONDITIONS
**
** Name: BC-1 Type: Displacement/Rotation
*Boundary
FixedPoint, 1, 1
FixedPoint, 2, 2
FixedPoint, 3, 3, -3.
FixedPoint, 4, 4
FixedPoint, 6, 6
** Name: BC-2 Type: Displacement/Rotation
*Boundary
LoadPoint, 1, 1
LoadPoint, 2, 2
LoadPoint, 3, 3, 3.
LoadPoint, 4, 4
LoadPoint, 6, 6
**
** CONTROLS
**
*Controls, reset
*Controls, parameters=time incrementation
, , , , , , , 15, , ,
**
** OUTPUT REQUESTS
**
*Restart, write, frequency=0
**
** FIELD OUTPUT: F-Output-1
**
*Output, field, frequency=10
*Node Output
RF, U
*Element Output, directions=YES
S,
**
** HISTORY OUTPUT: H-Output-1
**
*Output, history, time interval=0.01
*Node Output, nset=LoadPoint
RT, UT
*End Step
