*Heading
*Preprint, echo=NO, model=NO, history=NO, contact=NO
*Part, name=Bot
*Node
      1,          40.,           3.,   2.24000001
      2,          40.,           3.,           0.
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*Element, type=C3D8
 1,  56, 227, 453, 199,   1,  15, 157,  33
 2, 227, 228, 454, 453,  15,  16, 158, 157
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*Nset, nset=Front
  3,  9, 61, 62
*Elset, elset=Front
 30, 31, 62, 63, 94, 95
*Nset, nset=Back
  3,  9, 61, 62
*Elset, elset=Back
 30, 31, 62, 63, 94, 95
*Nset, nset=Top
   1,  10,  11,  12,  55,  56
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*Elset, elset=Top
  97,  98,  99, 109, 110, 111
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*Nset, nset=Bot
   2,   6,  13,  14,  59,  60
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*Elset, elset=Bot
 106, 107, 108, 118, 119, 120
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*Nset, nset=FullGeom, generate
   1,  620,    1
*Elset, elset=FullGeom, generate
   1,  360,    1
*Nset, nset=X_Edges
   1,   2,   4,   5,   6,   7
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*Elset, elset=X_Edges
   1,   4,   5,   8,   9,  12
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*Orientation, name=Ori-1
1., 0., 0., 0., 1., 0.
1, 0.
*Solid Section, elset=FullGeom, orientation=Ori-1, material=BotMat
1.,
*End Part
*Part, name=Cz
*Node
      1,         110.,           3.,  0.200000003
      2,         110.,           2.,  0.200000003
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*USER ELEMENT, NODES=8, Type= U1, PROPERTIES=6, COORDINATES=3,
 VARIABLES=21
 1, 2, 3
*UEL PROPERTY,  elset=FullGeom
 2490,18,48.24,0.51,5.1,4,4
*ELEMENT, TYPE=U1, elset=FullGeom
 1,  13,  14,   6,   5,   9,  10,   2,   1
 2,  14,  15,   7,   6,  10,  11,   3,   2
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*Nset, nset=FullGeom, generate
   1,  184,    1
*Elset, elset=FullGeom, generate
  1,  66,   1
*Nset, nset=Top
   1,   2,   3,   4,   9,  10
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*Elset, elset=Top, generate
  1,  66,   1
*Nset, nset=Bot
   5,   6,   7,   8,  13,  14
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*Elset, elset=Bot, generate
  1,  66,   1
*Nset, nset=Front, generate
 1,  4,  1
*Elset, elset=Front, generate
 1,  3,  1
*Nset, nset=Back, generate
 177,  180,    1
*Elset, elset=Back, generate
 64,  66,   1
*Nset, nset=X_Edges
   1,   4,   5,   8,   9,  12
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*Elset, elset=X_Edges
  1,  3,  4,  6,  7,  9
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*End Part
*Part, name=Top
*Node
      1,          40.,           3.,   2.24000001
      2,          40.,           3.,           0.
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*Element, type=C3D8
 1,  56, 227, 453, 199,   1,  15, 157,  33
 2, 227, 228, 454, 453,  15,  16, 158, 157
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*Nset, nset=Front
  3,  9, 61, 62
*Elset, elset=Front
 30, 31, 62, 63, 94, 95
*Nset, nset=Back
  3,  9, 61, 62
*Elset, elset=Back
 30, 31, 62, 63, 94, 95
*Nset, nset=Top
   1,  10,  11,  12,  55,  56
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*Elset, elset=Top
  97,  98,  99, 109, 110, 111
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*Nset, nset=Bot
   2,   6,  13,  14,  59,  60
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*Elset, elset=Bot
 106, 107, 108, 118, 119, 120
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*Nset, nset=FullGeom, generate
   1,  620,    1
*Elset, elset=FullGeom, generate
   1,  360,    1
*Nset, nset=X_Edges
   1,   2,   4,   5,   6,   7
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*Elset, elset=X_Edges
   1,   4,   5,   8,   9,  12
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*Orientation, name=Ori-1
1., 0., 0., 0., 1., 0.
1, 0.
*Solid Section, elset=FullGeom, orientation=Ori-1, material=TopMat
1.,
*End Part
*Assembly, name=Assembly
*Instance, name=ceInst, part=Cz
         40.,           0.,         2.24
*End Instance
*Instance, name=pTop, part=Top
          0.,           0.,         2.44
*End Instance
*Instance, name=pBot, part=Bot
*End Instance
*Node
      1,           0.,           0.,   4.67999983
*Node
      2,           0.,           0.,           0.
*Nset, nset=FixedEnd, instance=pBot
  3,  9, 61, 62
*Elset, elset=FixedEnd, instance=pBot
 30, 31, 62, 63, 94, 95
*Nset, nset=FixedPoint
 2,
*Nset, nset=LoadEnd, instance=pTop
  3,  9, 61, 62
*Elset, elset=LoadEnd, instance=pTop
 30, 31, 62, 63, 94, 95
*Nset, nset=LoadPoint
 1,
*Surface, type=NODE, name=ceInst_Top_CNS_, internal
ceInst.Top, 1.
*Surface, type=NODE, name=pTop_Bot_CNS_, internal
pTop.Bot, 1.
*Surface, type=NODE, name=ceInst_Bot_CNS_, internal
ceInst.Bot, 1.
*Surface, type=NODE, name=pBot_Top_CNS_, internal
pBot.Top, 1.
*Surface, type=NODE, name=FixedEnd_CNS_, internal
FixedEnd, 1.
*Surface, type=NODE, name=LoadEnd_CNS_, internal
LoadEnd, 1.
*Tie, name=Constraint-1, adjust=no, no rotation, type=NODE TO SURFACE
pTop_Bot_CNS_, ceInst_Top_CNS_
*Tie, name=Constraint-2, adjust=no, no rotation, type=NODE TO SURFACE
pBot_Top_CNS_, ceInst_Bot_CNS_
*Coupling, constraint name=Constraint-11, ref node=FixedPoint, surface=FixedEnd_CNS_
*Kinematic
*Coupling, constraint name=Constraint-12, ref node=LoadPoint, surface=LoadEnd_CNS_
*Kinematic
*End Assembly
*Material, name=BotMat
*Elastic, type=ENGINEERING CONSTANTS
140000.,8819.,8819., 0.34, 0.34, 0.38,4315.,4315.
3200.,
*Material, name=CzMat
*Damage Initiation, criterion=QUADS
18., 48.24, 48.24
*Damage Evolution, type=ENERGY, mixed mode behavior=BK, power=4.
 0.51, 5.1, 5.1
*Elastic, type=TRACTION
2490.,2490.,2490.
*Material, name=TopMat
*Elastic, type=ENGINEERING CONSTANTS
140000.,8819.,8819., 0.34, 0.34, 0.38,4315.,4315.
3200.,
*Step, name=Step-1, nlgeom=YES, inc=1000000000
*Static
0.001, 1., 1e-15, 0.01
*Boundary
FixedPoint, 1, 1
FixedPoint, 2, 2
FixedPoint, 3, 3, -3.
FixedPoint, 4, 4
FixedPoint, 6, 6
*Boundary
LoadPoint, 1, 1
LoadPoint, 2, 2
LoadPoint, 3, 3, 3.
LoadPoint, 4, 4
LoadPoint, 6, 6
*Controls, reset
*Controls, parameters=time incrementation
, , , , , , , 15, , ,
*Restart, write, frequency=0
*Output, field, frequency=10
*Node Output
RF, U
*Element Output, directions=YES
S,
*Output, history, time interval=0.01
*Node Output, nset=LoadPoint
RT, UT
*End Step
